Thu Oct  3 11:28:05 CDT 2024
$PROBLEM From bbr: see 106.yaml for details

$INPUT C NUM ID TIME AMT RATE EVID MDV CMT DV BLQ WT AGE DOSE

$DATA ../../data/nmdat1.csv IGNORE=@ IGNORE(BLQ=1)

$SUBROUTINE ADVAN13 TRANS1 TOL=8

$MODEL
  COMP=(DEPOT)
  COMP=(CENT)

$PK
  ; Typical values of PK parameters
  TVCL   = THETA(1)
  TVV    = THETA(2)
  TVKA   = THETA(3)
  TVD1   = THETA(4)

  ; PK covariates
  CL_AGE = (AGE/35.0)**THETA(5)
  CL_WT  = (WT/70)**THETA(6)
  V_WT   = (WT/70)**THETA(7)

  CLCOV = CL_AGE*CL_WT
  VCOV  = V_WT

  ; PK parameters
  CL = TVCL*CLCOV*EXP(ETA(1));
  V  = TVV*VCOV*EXP(ETA(2));
  KA = TVKA;
  D1 = TVD1*EXP(ETA(3));

  S2 = V

$DES
  DADT(1) = -KA*A(1)
  DADT(2) = KA*A(1)-(CL/V)*A(2)

$ERROR
  IPRED = A(2)/S2
  Y=IPRED*(1+EPS(1))

$THETA  ; log values
  (0,0.5)   ;  1 TVCL (L/hr)
  (0,2.5)   ;  2 TVV  (L)
  (0,0.2)   ;  3 TVKA (1/hr)
  (0,0.5)   ;  4 TVD1 (hr)
  (-0.5)    ;  5 CL_AGE
  (0.8)     ;  6 CL_WT
  (1)       ;  7 V_WT

$OMEGA BLOCK(2)
  0.2       ;ETA(CL)
  0.01 0.1  ;ETA(V)

$OMEGA BLOCK(1)
  0.1       ;ETA(KA)

$SIGMA
  0.05     ; 1 pro error

$EST MAXEVAL=9999 METHOD=1 INTER SIGL=6 NSIG=3 PRINT=1 RANMETHOD=P MSFO=./hwwk6.msf
$COV PRINT=E RANMETHOD=P
$TABLE NUM IPRED NPDE CWRES NOPRINT ONEHEADER RANMETHOD=P FILE=hwwk6.tab
$TABLE NUM CL V KA D1 ETAS(1:LAST) NOAPPEND NOPRINT ONEHEADER FILE=hwwk6par.tab

NM-TRAN MESSAGES
 WARNINGS AND ERRORS (IF ANY) FOR PROBLEM    1
 (WARNING  2) NM-TRAN INFERS THAT THE DATA ARE POPULATION.
 LIM VALUES MAXLIM ASSESSED BY NMTRAN: 1,2,3,4,5,6,7,8,10,11,13,15,16

1NONLINEAR MIXED EFFECTS MODEL PROGRAM (NONMEM) VERSION 7.5.0
 ORIGINALLY DEVELOPED BY STUART BEAL, LEWIS SHEINER, AND ALISON BOECKMANN
 CURRENT DEVELOPERS ARE ROBERT BAUER, ICON DEVELOPMENT SOLUTIONS,
 AND ALISON BOECKMANN. IMPLEMENTATION, EFFICIENCY, AND STANDARDIZATION
 PERFORMED BY NOUS INFOSYSTEMS.
 PROBLEM NO.:         1
 From bbr: see 106.yaml for details
 TOT. NO. OF OBS RECS:      359
 TOT. NO. OF INDIVIDUALS:       50
 GENERAL NONLINEAR KINETICS MODEL WITH STIFF/NONSTIFF EQUATIONS (LSODA, ADVAN13)
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 #TBLN:      1
 #METH: First Order Conditional Estimation with Interaction
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
 #TERM:
0MINIMIZATION SUCCESSFUL
 NO. OF FUNCTION EVALUATIONS USED:      325
 NO. OF SIG. DIGITS IN FINAL EST.:  3.5

 ETABAR IS THE ARITHMETIC MEAN OF THE ETA-ESTIMATES,
 AND THE P-VALUE IS GIVEN FOR THE NULL HYPOTHESIS THAT THE TRUE MEAN IS 0.

 ETABAR:         7.5375E-03 -7.4783E-03  5.8603E-03
 SE:             4.9764E-02  4.2965E-02  2.1246E-02
 N:                      50          50          50

 P VAL.:         8.7961E-01  8.6182E-01  7.8267E-01

 ETASHRINKSD(%)  7.3082E+00  8.7689E+00  3.0889E+01
 ETASHRINKVR(%)  1.4082E+01  1.6769E+01  5.2236E+01
 EBVSHRINKSD(%)  7.7884E+00  9.1193E+00  3.1492E+01
 EBVSHRINKVR(%)  1.4970E+01  1.7407E+01  5.3066E+01
 RELATIVEINF(%)  8.1232E+01  6.7522E+01  4.0067E+01
 EPSSHRINKSD(%)  1.4023E+01
 EPSSHRINKVR(%)  2.6079E+01


 TOTAL DATA POINTS NORMALLY DISTRIBUTED (N):          359
 N*LOG(2PI) CONSTANT TO OBJECTIVE FUNCTION:    659.797866840955
 OBJECTIVE FUNCTION VALUE WITHOUT CONSTANT:    2284.40721452299
 OBJECTIVE FUNCTION VALUE WITH CONSTANT:       2944.20508136395
 REPORTED OBJECTIVE FUNCTION DOES NOT CONTAIN CONSTANT

 TOTAL EFFECTIVE ETAS (NIND*NETA):                           150


 #TERE:
 Elapsed estimation  time in seconds:     4.48
 Elapsed covariance  time in seconds:     3.85
 Elapsed postprocess time in seconds:     0.27

 ********************               FIRST ORDER CONDITIONAL ESTIMATION WITH INTERACTION              ********************
 #OBJT:**************                       MINIMUM VALUE OF OBJECTIVE FUNCTION                      ********************
 #OBJV:********************************************     2284.407       **************************************************

 ********************               FIRST ORDER CONDITIONAL ESTIMATION WITH INTERACTION              ********************
 ********************                             FINAL PARAMETER ESTIMATE                           ********************

 THETA - VECTOR OF FIXED EFFECTS PARAMETERS   *********
         TH 1      TH 2      TH 3      TH 4      TH 5      TH 6      TH 7
         5.91E-01  2.63E+00  2.13E-01  4.77E-01 -7.91E-01  1.07E+00  1.15E+00

 OMEGA - COV MATRIX FOR RANDOM EFFECTS - ETAS  ********
         ETA1      ETA2      ETA3
 ETA1
+        1.47E-01
 ETA2
+        4.72E-02  1.13E-01
 ETA3
+        0.00E+00  0.00E+00  4.82E-02

 SIGMA - COV MATRIX FOR RANDOM EFFECTS - EPSILONS  ****
         EPS1
 EPS1
+        5.16E-02

 OMEGA - CORR MATRIX FOR RANDOM EFFECTS - ETAS  *******
         ETA1      ETA2      ETA3
 ETA1
+        3.83E-01
 ETA2
+        3.66E-01  3.36E-01
 ETA3
+        0.00E+00  0.00E+00  2.20E-01

 SIGMA - CORR MATRIX FOR RANDOM EFFECTS - EPSILONS  ***
         EPS1
 EPS1
+        2.27E-01

 ********************               FIRST ORDER CONDITIONAL ESTIMATION WITH INTERACTION              ********************
 ********************                            STANDARD ERROR OF ESTIMATE                          ********************

 THETA - VECTOR OF FIXED EFFECTS PARAMETERS   *********
         TH 1      TH 2      TH 3      TH 4      TH 5      TH 6      TH 7
         3.69E-02  4.35E-01  3.32E-02  2.61E-02  4.15E-01  1.25E-01  7.99E-02

 OMEGA - COV MATRIX FOR RANDOM EFFECTS - ETAS  ********
         ETA1      ETA2      ETA3
 ETA1
+        3.68E-02
 ETA2
+        2.08E-02  2.54E-02
 ETA3
+       ......... .........  2.34E-02

 SIGMA - COV MATRIX FOR RANDOM EFFECTS - EPSILONS  ****
         EPS1
 EPS1
+        4.83E-03

 OMEGA - CORR MATRIX FOR RANDOM EFFECTS - ETAS  *******
         ETA1      ETA2      ETA3
 ETA1
+        4.80E-02
 ETA2
+        1.57E-01  3.78E-02
 ETA3
+       ......... .........  5.33E-02

 SIGMA - CORR MATRIX FOR RANDOM EFFECTS - EPSILONS  ***
         EPS1
 EPS1
+        1.06E-02

 ********************               FIRST ORDER CONDITIONAL ESTIMATION WITH INTERACTION              ********************
 ********************                          COVARIANCE MATRIX OF ESTIMATE                         ********************

            TH 1      TH 2      TH 3      TH 4      TH 5      TH 6      TH 7      OM11      OM12      OM13      OM22      OM23
             OM33      SG11
 TH 1
+        1.36E-03
 TH 2
+        1.61E-03  1.89E-01
 TH 3
+        2.20E-06  1.34E-02  1.10E-03
 TH 4
+        4.68E-05 -2.48E-03 -8.77E-05  6.81E-04
 TH 5
+        5.08E-03 -8.75E-02 -6.85E-03  9.33E-05  1.72E-01
 TH 6
+        1.09E-03  2.10E-02  1.59E-03  3.17E-04 -3.13E-03  1.57E-02
 TH 7
+        5.29E-04  6.05E-03  9.41E-05  2.63E-04 -7.50E-04  2.25E-03  6.38E-03
 OM11
+        7.98E-05 -6.60E-04 -3.78E-05 -7.79E-05 -1.48E-03 -1.09E-03 -1.08E-03  1.35E-03
 OM12
+       -2.89E-05 -1.57E-03 -1.53E-04 -1.02E-04  5.44E-04 -1.01E-03 -1.66E-04  4.37E-05  4.31E-04
 OM13
+       ......... ......... ......... ......... ......... ......... ......... ......... ......... .........
 OM22
+        1.14E-04 -1.63E-03 -1.02E-04 -3.36E-05  2.91E-03 -1.48E-04 -1.82E-04 -7.50E-06  1.71E-04 .........  6.45E-04
 OM23
+       ......... ......... ......... ......... ......... ......... ......... ......... ......... ......... ......... .........
 OM33
+       -1.69E-04  1.21E-03  9.98E-05 -2.37E-04 -1.60E-03 -5.93E-05  1.50E-04 -4.31E-05  2.05E-05 ......... -1.92E-04 .........
          5.49E-04
 SG11
+       -3.13E-06  9.68E-05 -3.38E-06  3.91E-06 -1.55E-04 -9.36E-05  1.43E-05 -1.30E-05  3.18E-05 .........  2.34E-06 .........
         -2.08E-05  2.33E-05

 ********************               FIRST ORDER CONDITIONAL ESTIMATION WITH INTERACTION              ********************
 ********************                          CORRELATION MATRIX OF ESTIMATE                        ********************

            TH 1      TH 2      TH 3      TH 4      TH 5      TH 6      TH 7      OM11      OM12      OM13      OM22      OM23
             OM33      SG11
 TH 1
+        3.69E-02
 TH 2
+        1.01E-01  4.35E-01
 TH 3
+        1.79E-03  9.29E-01  3.32E-02
 TH 4
+        4.86E-02 -2.18E-01 -1.01E-01  2.61E-02
 TH 5
+        3.33E-01 -4.85E-01 -4.97E-01  8.61E-03  4.15E-01
 TH 6
+        2.36E-01  3.85E-01  3.82E-01  9.69E-02 -6.02E-02  1.25E-01
 TH 7
+        1.80E-01  1.74E-01  3.55E-02  1.26E-01 -2.26E-02  2.25E-01  7.99E-02
 OM11
+        5.89E-02 -4.13E-02 -3.09E-02 -8.11E-02 -9.70E-02 -2.37E-01 -3.67E-01  3.68E-02
 OM12
+       -3.78E-02 -1.74E-01 -2.23E-01 -1.88E-01  6.32E-02 -3.89E-01 -9.99E-02  5.73E-02  2.08E-02
 OM13
+       ......... ......... ......... ......... ......... ......... ......... ......... ......... .........
 OM22
+        1.22E-01 -1.48E-01 -1.20E-01 -5.07E-02  2.76E-01 -4.64E-02 -8.98E-02 -8.03E-03  3.25E-01 .........  2.54E-02
 OM23
+       ......... ......... ......... ......... ......... ......... ......... ......... ......... ......... ......... .........
 OM33
+       -1.96E-01  1.19E-01  1.28E-01 -3.88E-01 -1.65E-01 -2.02E-02  8.03E-02 -5.00E-02  4.22E-02 ......... -3.23E-01 .........
          2.34E-02
 SG11
+       -1.76E-02  4.61E-02 -2.11E-02  3.10E-02 -7.73E-02 -1.55E-01  3.71E-02 -7.34E-02  3.17E-01 .........  1.91E-02 .........
         -1.84E-01  4.83E-03
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
 ********************               FIRST ORDER CONDITIONAL ESTIMATION WITH INTERACTION              ********************
 ********************                      EIGENVALUES OF COR MATRIX OF ESTIMATE                     ********************

             1         2         3         4         5         6         7         8         9        10        11        12
         3.94E-02  3.24E-01  3.74E-01  4.76E-01  5.22E-01  6.90E-01  9.09E-01  1.28E+00  1.32E+00  1.44E+00  1.86E+00  2.76E+00
 Elapsed finaloutput time in seconds:     0.04
 #CPUT: Total CPU Time in Seconds,       30.839
